// SBML level 3 version 1

model aggregate()
  // model units - time: second, extent: mole

  // Compartments:
  compartment submod1__c = 1 litre;

  // Species:
  substanceOnly species submod1__S in submod1__c = 1;  // substance in mole
  substanceOnly species submod1__S1 in submod1__c = 1;  // substance in mole
  substanceOnly species submod1__S2 in submod1__c = 1;  // substance in mole
  substanceOnly species submod1__S3 in submod1__c = 1;  // substance in mole
  substanceOnly species submod1__S4 in submod1__c = 1;  // substance in mole

  // Reactions:
  submod1__R1: submod1__S1 => submod1__S2; submod1__S1/submod1__R1_k;
    submod1__R1_k = 0.1 second;
  submod1__R2: submod1__S2 => submod1__S4; submod1__S2/submod1__R2_k;
    submod1__R2_k = 0.1 second;
end
